*Heading
** Job name: Matrix_inclusion1 Model name: Model-1
** Generated by: Abaqus/CAE 6.13-3
*Preprint, echo=NO, model=NO, history=NO, contact=NO
**
** PARTS
**
*Part, name=Matrix_Inclusion
*Node
      1,           5.,           0.,          7.5
      2,          10.,           5.,          7.5
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*Element, type=C3D8R
  1,  292,  293,  980,  964,   21,   20,  210,  209
  2,  293,  294,  981,  980,   20,   19,  211,  210
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*Nset, nset=Set-1
    1,    2,    3,   11,   12,   17
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*Elset, elset=Set-1, generate
 607,  878,    1
*Nset, nset=Set-2
    1,    2,    3,    4,    5,    6
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*Elset, elset=Set-2
    1,    2,    3,    4,    5,    6
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** Section: Matrix
*Solid Section, elset=Set-2, material=Material-2
,
** Section: Inclusion
*Solid Section, elset=Set-1, material=Material-1
,
*End Part
**
**
** ASSEMBLY
**
*Assembly, name=Assembly
**
*Instance, name=Matrix_Inclusion-1, part=Matrix_Inclusion
*End Instance
**
*End Assembly
**
** MATERIALS
**
*Material, name=Material-1
*Elastic
3., 0.3
*Material, name=Material-2
*Elastic
4., 0.4
