*Heading
** Job name: Matrix_Inclusion Model name: Model-1
** Generated by: Abaqus/CAE 6.13-3
*Preprint, echo=NO, model=NO, history=NO, contact=NO
**
** PARTS
**
*Part, name=Part-3
*Node
      1,          10.,           5.,           5.
      2,           0.,           5.,           5.
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*Element, type=C3D8R
  1,  397,  398, 1629, 1573,   32,   31,  333,  332
  2,  398,  399, 1630, 1629,   31,   30,  334,  333
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*Nset, nset=Set-1
    8,    9,   10,   11,   92,   93
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*Elset, elset=Set-1, generate
 301,  354,    1
*Nset, nset=Set-2
    1,    2,    3,    4,    5,    6
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*Elset, elset=Set-2
    1,    2,    3,    4,    5,    6
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** Section: Section-2
*Solid Section, elset=Set-2, material=Material-2
,
** Section: Section-1
*Solid Section, elset=Set-1, material=Material-1
,
*End Part
**
**
** ASSEMBLY
**
*Assembly, name=Assembly
**
*Instance, name=Part-3-1, part=Part-3
*End Instance
**
*Nset, nset=Set-1, instance=Part-3-1
   1,   5,  13,  18,  19,  20
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*Elset, elset=Set-1, instance=Part-3-1
  755,  756,  757,  758,  759,  760
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*Nset, nset=Set-2, instance=Part-3-1
 19, 21
*End Assembly
**
** MATERIALS
**
*Material, name=Material-1
*Elastic
2000., 0.29
*Material, name=Material-2
*Elastic
2000., 0.29
** ----------------------------------------------------------------
**
** STEP: Step-1
**
*Step, name=Step-1, nlgeom=YES
*Static
1., 1., 1e-05, 1.
**
** OUTPUT REQUESTS
**
*Restart, write, frequency=0
**
** FIELD OUTPUT: F-Output-1
**
*Output, field, variable=PRESELECT
**
** HISTORY OUTPUT: H-Output-1
**
*Output, history, variable=PRESELECT
*End Step
