*Heading
** Job name: Matrix_inclusion Model name: Model-1
** Generated by: Abaqus/CAE 6.13-3
*Preprint, echo=NO, model=NO, history=NO, contact=NO
**
** PARTS
**
*Part, name=Part-2
*Node
      1,           0.,           0.,           0.
      2,           0.,           0.,  0.552551806
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*Element, type=C3D8R
 1, 410, 418, 415, 409, 454, 462, 461, 452
 2, 418, 419, 416, 415, 462, 463, 460, 461
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*Nset, nset=Set-1, generate
   1,  486,    1
*Elset, elset=Set-1, generate
   1,  213,    1
*Nset, nset=Set-4
   1,   2,   3,   4,   5,   6
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*Elset, elset=Set-4, generate
  49,  213,    1
*Elset, elset=Set-3
  1,  2,  3,  4,  5,  6
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*Elset, elset=Set-5
 24,
*Elset, elset=Set-6
  49,  50,  51,  52,  53,  54
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*Elset, elset=Set-7
 89,
** Section: Inclusion
*Solid Section, elset=Set-3, material=Material-1
,
** Section: Inclusion
*Solid Section, elset=Set-5, material=Material-1
,
** Section: Matrix
*Solid Section, elset=Set-6, material=Material-2
,
** Section: Matrix
*Solid Section, elset=Set-7, material=Material-2
,
*End Part
**
**
** ASSEMBLY
**
*Assembly, name=Assembly
**
*Instance, name=Part-2-1, part=Part-2
*End Instance
**
*End Assembly
**
** MATERIALS
**
*Material, name=Material-1
*Elastic
3., 0.3
*Material, name=Material-2
*Elastic
4., 0.4
